# a)
(s + ω_1)/(s + ω_2)
# Definition på billineære transformation: (approksimation til digital domæne)
s == 2/T*((1 - z^-1)/(1 + z^-1))  # <- T = sampling periode.
# Substitution:
s/(s + ω_2) == 2/T*((1 - z^-1)/(1 + z^-1))/(2/T*((1 - z^-1)/(1 + z^-1)) + ω_2)  # og:
ω_1/(s + ω_2) == ω_1/(2/T*((1 - z^-1)/(1 + z^-1)) + ω_2)
# Samlet:
(s + ω_1)/(s + ω_2) == (2/T*((1 - z^-1)/(1 + z^-1)) + ω_1)/(2/T*((1 - z^-1)/(1 + z^-1)) + ω_2)  # ->
(2/T*((1 - z^-1)/(1 + z^-1)) + ω_1)/(2/T*((1 - z^-1)/(1 + z^-1)) + ω_2) simplify → (2*z + ω_1*T + ω_1*T*z - 2)/(2*z + ω_2*T + ω_2*T*z - 2)
(2*z + ω_1*T(1 + z) - 2)/(2*z + ω_2*T(1 + z) - 2)
ω_1 := 565
ω_2 := 942
T := 0.001
(2*z + ω_1*T*(1 + z) - 2)/(2*z + ω_2*T*(1 + z) - 2) float, 3 → (2.56*z - 1.43)/(2.94*z - 1.06)
